# - Modelling of LLC Converter
# Input Resistance:
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Z_in == jωL_r + 1/jωC_r + R_ac*jωL_m/(R_ac + jωL_m)
# set:
# The quality factor:
Q == Z_r/R_ac == sqrt(L_r/C_r)/R_ac
# The ratio of frequency:
x == ω/ω_r == ω/(1/sqrt(L_r*C_r)) == ω*sqrt(L_r*C_r)
# The ratio of inductance:
k == L_m/L_r
# then Zin can be calculated as:
Z_in == j(x*Q*R_ac - 1/x*Q*R_ac) + (j*R_ac^3*x*k*Q + R_ac^3*(x*k*Q)^2)/(R_ac^2 + x^2*k^2*Q^2*R_ac^2)
Z_in == Q*R_ac*(x^2*k^2/(x^2*k^2*Q^2 + 1) + j(x - 1/x + x*k/(x^2*k^2*Q^2 + 1)))
# The virtual part of the resistance is zero, then:
x - 1/x + x*k/(x^2*k^2*Q^2 + 1) == 0
Q^2 == 1/(k*(1 - x^2)) - 1/(k^2*x^2)
# Then the maximum of Q is:
# How to understand?
# With specific fsw and inductor ratio, the heaviest load.
Q_max(x, k) := sqrt(1/(k*(1 - x^2)) - 1/(k^2*x^2))
# otherwise the converter will operate in capacitive region.
# The gain of the converter is expressed as:
G == j*ω*L_m*R_ac/(j*ω*L_m + R_ac)/(1/(j*ω*C_r) + j*ω*L_r + j*ω*L_m*R_ac/(j*ω*L_m + R_ac))
G == 1/(1 + j*ω*L_r/R_ac + L_r/L_m + 1/(j*ω*C_r*R_ac) + 1/((j*ω)^2*L_m*C_r))
G == 1/((1 + L_r/L_m - 1/(ω^2*L_m*C_r)) + j*(ω*L_r/R_ac - (-1/(ω*C_r*R_ac))))
# Substituting x and k in the above equation, then the ABS of G is:
G(x, k, Q) := 1/sqrt((1 + 1/k - 1/(x^2*k))^2 + Q^2*(x - 1/x)^2)
# How to understand?
# With specific load, fsw and inductor ratio, the gain of the converter.
# [plot: G(x, 10, 0.2), G(x, 10, 1), G(x, 10, 5) vs x]
# The diagram of G can be depicted as:
# So, it can be found that fmin @ (Gmax, Qmax), and fmax @ (Gmin, Qmin)
G_max == 1/sqrt((1 + 1/k - 1/(x^2*k))^2 + Q_max^2*(x - 1/x)^2)
G_max == 1/sqrt((1 + 1/k - 1/(x^2*k))^2 + (1/(k*(1 - x^2)) - 1/(k^2*x^2))*(x - 1/x)^2)
1/sqrt((1 + 1/k - 1/(x^2*k))^2 + (1/(k*(1 - x^2)) - 1/(k^2*x^2))*(x - 1/x)^2) simplify → ((k*x^2 + x^2 - 1)/(k*x^2))^(-1/2)
# The expression can be simplified as:
G_max == sqrt(k*x^2/(k*x^2 + x^2 - 1))
# then:
G_max^2 == k*x^2/(k*x^2 + x^2 - 1) solve, x → [G_max/sqrt(G_max^2*k - k + G_max^2); -G_max/sqrt(G_max^2*k - k + G_max^2)]
# The x is positive, then
x == G_max/sqrt(G_max^2*k - k + G_max^2)
x == 1/sqrt(k(1 - 1/G_max^2) + 1)
ω_min/ω_r == 1/sqrt(k(1 - 1/G_max^2) + 1)
# As calculated aformentioned, the critical expression of Q is:
Q^2 == 1/(k*(1 - x^2)) - 1/(k^2*x^2)
Q^2 == 1/(k*(1 - G_max^2/(G_max^2*k - k + G_max^2))) - 1/(k^2*G_max^2/(G_max^2*k - k + G_max^2))
1/(k*(1 - G_max^2/(G_max^2*k - k + G_max^2))) - 1/(k^2*G_max^2/(G_max^2*k - k + G_max^2)) simplify → (G_max^2*k - k + G_max^2)/(G_max^2*k^2*(G_max^2 - 1))
# So, Qmax can be expressed with Gmax and k:
Q_max == sqrt((G_max^2*k - k + G_max^2)/(G_max^2*k^2*(G_max^2 - 1)))
# When Q=0, Gmin is:
G_min == 1/(1 + 1/k - 1/(x^2*k))
G_min == 1/(1 + 1/k - 1/(x^2*k)) solve, x → [sqrt(G_min)/sqrt(G_min - k + G_min*k); -sqrt(G_min)/sqrt(G_min - k + G_min*k)]
# then:
x == 1/sqrt(1 + k(1 - 1/G_min))
ω_max/ω_r == 1/sqrt(1 + k(1 - 1/G_min))
# 这里到底是如何设计的我还没有搞清楚！
# - Input Parameters
# Set the virtual num:
j := sqrt(-1)
# Minimum input voltage:
V_in_min := 24 V
# Maximum input voltage:
V_in_max := 24 V
# Normal input voltage:
V_in_nor := 24 V
# Minimum output voltage:
V_o_min := 44.8 V
# Maximum output voltage:
V_o_max := 58.4 V
# Normal output voltage:
V_o_nor := 3.2*16 V = 51.2 V
# Estimated efficiency:
η := 0.96
# Input power:
P_in := 250 W
# Output power:
P_o := P_in*η = 240 W
# Normal output current:
I_o_nor := P_o/V_o_nor = 4.6875 A
# Maximum output current:
I_o_max := P_o/V_o_min = 5.35714 A
# Minimum output current:
I_o_min := P_o/V_o_max = 4.10959 A
# Ripple factor:
r := 0.02
# Inductor current ripple:
ΔI_L_nor := r*I_o_nor = 0.09375 A
# Resonant switching frequency:
f_r := 120*10^3 Hz
# Resonant period:
T_r := 1/f_r = 8.33333 μs
# Dead time:
T_dead := 200 ns
# Operating temperature:
T_a := 25 °C
# Allowing rise temperature:
ΔT := 75 °C
# Resistance of Cu @100deg:
ρ := 2.227*10^-8 Ω*m
# Voltage of diodes:
V_d := 0.7 V
# Trans Turn Ratio
n_p2s := V_in_nor/(V_o_nor + 2*V_d) = 0.456274
n_p2s := 0.5
G_min := n_p2s*(V_o_min + 2*V_d)/V_in_min = 0.9625
G_max := n_p2s*(V_o_max + 2*V_d)/V_in_max = 1.24583
# Equivalent Primary Rac
R_ac_min := n_p2s^2*2/π^2*V_o_min^2/P_o = 0.423658 Ω
R_ac_max := n_p2s^2*2/π^2*V_o_max^2/P_o = 0.719921 Ω
R_ac_nor := n_p2s^2*2/π^2*V_o_nor^2/P_o = 0.553349 Ω
# Resonant Tank
# Set the ratio of Lm to Lr:
k := 4
# The fmin is:
f_min := f_r/sqrt(k*(1 - 1/G_max^2) + 1) = 77.0936 kHz
# the fmin can be changed?
# The fmax is:
f_max := f_r/sqrt(1 + k*(1 - 1/G_min)) = 130.608 kHz
# Then the Qmax is:
Q_max := sqrt((G_max^2*k - k + G_max^2)/(G_max^2*k^2*(G_max^2 - 1))) = 0.523714
# Leave some margin:
Q_max := 0.95*Q_max = 0.497528
# As described before:
sqrt(L_r/C_r) == Q*R_ac
sqrt(L_r*C_r) == 1/(2*π*f_r)
# Lr can be derived as:
L_r := Q_max*R_ac_min/(2*π*f_r) = 0.279558 μH
# Cr can be derived as:
C_r := 1/(Q_max*R_ac_min*2*π*f_r) = 6.29226 μF
# Lm can be derived as:
L_m := k*L_r = 1.11823 μH
# - Time domain Analysis
# Parameter: | I don't know why divide with 2?
V_in := V_in_min/2 = 12 V
V_o := (V_o_max + 2*V_d)/2 = 29.9 V
I_o_half := 2*I_o_min = 8.21918 A
L_r := 0.28 μH
C_r := 6.3 μF
L_m := 1.2 μH
N := 0.5
ω_r := 1/sqrt(L_r*C_r) = 752923 rad/s
f_r := ω_r/(2*π) = 119.831 kHz
ω_r1 := 1/sqrt((L_r + L_m)*C_r) = 327491 rad/s
f_r1 := ω_r1/(2*π) = 52.1218 kHz
Z_r := sqrt(L_r/C_r) = 0.210819 Ω
Z_r1 := sqrt((L_r + L_m)/C_r) = 0.484686 Ω
# State 1:
# Voltage of Cr:
v_C1(V_C0, I_L0, t) := V_in - N*V_o + (V_C0 - V_in + N*V_o)*cos(ω_r*t) + I_L0*Z_r*sin(ω_r*t)
# Current of Lr:
i_L1(V_C0, I_L0, t) := I_L0*cos(ω_r*t) + (V_in - V_C0 - N*V_o)/Z_r*sin(ω_r*t)
# Current of Lm:
i_Lm1(I_L0, t) := I_L0 + N*V_o/L_m*t
# State 2:
# Voltage of Cr:
v_C2(V_C0, I_L0, D_0, T_sw0, t) := V_in + (v_C1(V_C0, I_L0, D_0*T_sw0) - V_in)*cos(ω_r1*(t - D_0*T_sw0)) + i_L1(V_C0, I_L0, D_0*T_sw0)*Z_r1*sin(ω_r1*(t - D_0*T_sw0))
# Current of Lr:
i_L2(V_C0, I_L0, D_0, T_sw0, t) := i_L1(V_C0, I_L0, D_0*T_sw0)*cos(ω_r1*(t - D_0*T_sw0)) + (V_in - v_C1(V_C0, I_L0, D_0*T_sw0))/Z_r1*sin(ω_r1*(t - D_0*T_sw0))
# Current of Lm:
i_Lm2(V_C0, I_L0, D_0, T_sw0, t) := i_L2(V_C0, I_L0, D_0, T_sw0, t)
# Given the function to solve:
solve block
    # guess values
    V_C0 := 0 V
    I_L0 := -10 A
    D_0 := 0.3
    T_sw0 := 11 μs
    # constraints
    i_L2(V_C0, I_L0, D_0, T_sw0, 0.5*T_sw0) == -I_L0
    v_C2(V_C0, I_L0, D_0, T_sw0, 0.5*T_sw0) == -V_C0
    i_Lm1(I_L0, D_0*T_sw0) == i_L1(V_C0, I_L0, D_0*T_sw0)
    integral(i_L1(V_C0, I_L0, t) - i_Lm1(I_L0, t), t = 0 .. D_0*T_sw0)/(0.5*T_sw0)*N == I_o_half
    # solver
    [V_C0; I_L0; D_0; T_sw0] := find(V_C0, I_L0, D_0, T_sw0) = [-8.98065 V; -29.3902 A; 0.394902; 1.10507e-5 s]
end solve block
# The waveforms in a period:
# Voltage of Cr:
v_Cr(t) :=
    if 0 ≤ t < D_0*T_sw0
        v_C1(V_C0, I_L0, t)
    else if D_0*T_sw0 ≤ t < 0.5*T_sw0
        v_C2(V_C0, I_L0, D_0, T_sw0, t)
    else if 0.5*T_sw0 ≤ t < (0.5 + D_0)*T_sw0
        -v_C1(V_C0, I_L0, t - 0.5*T_sw0)
    else if (0.5 + D_0)*T_sw0 ≤ t ≤ T_sw0
        -v_C2(V_C0, I_L0, D_0, T_sw0, t - 0.5*T_sw0)
# Current of Lr:
i_Lr(t) :=
    if 0 ≤ t < D_0*T_sw0
        i_L1(V_C0, I_L0, t)
    else if D_0*T_sw0 ≤ t < 0.5*T_sw0
        i_L2(V_C0, I_L0, D_0, T_sw0, t)
    else if 0.5*T_sw0 ≤ t < (0.5 + D_0)*T_sw0
        -i_L1(V_C0, I_L0, t - 0.5*T_sw0)
    else if (0.5 + D_0)*T_sw0 ≤ t ≤ T_sw0
        -i_L2(V_C0, I_L0, D_0, T_sw0, t - 0.5*T_sw0)
# Current of Lm:
i_Lm(t) :=
    if 0 ≤ t < D_0*T_sw0
        i_Lm1(I_L0, t)
    else if D_0*T_sw0 ≤ t < 0.5*T_sw0
        i_Lm2(V_C0, I_L0, D_0, T_sw0, t)
    else if 0.5*T_sw0 ≤ t < (0.5 + D_0)*T_sw0
        -i_Lm1(I_L0, t - 0.5*T_sw0)
    else if (0.5 + D_0)*T_sw0 ≤ t ≤ T_sw0
        -i_Lm2(V_C0, I_L0, D_0, T_sw0, t - 0.5*T_sw0)
# Voltage across Tx:
v_trans(t) := L_m*d/dt(i_Lm(t))
# Then the waveforms can be drawn as below:
# [plot: v_Cr(t*s) (V), i_Lr(t*s), i_Lm(t*s), v_trans(t*s) vs t]
